! Specifying Loads as Model 1 and 2 type loads. For no CVR, Model 2 loads will be blank
New load.S41P Bus=41.1 Phases=1 Model=1 kV=0.24 kW=0.831 kVAr=0.277 Vminpu=0.90 Vmaxpu=1.10 Daily=LoadShapeLoadDefault
New load.S42P Bus=42.1 Phases=1 Model=1 kV=0.24 kW=0.734 kVAr=0.245 Vminpu=0.90 Vmaxpu=1.10 Daily=LoadShapeLoadDefault
New load.S43P Bus=43.1 Phases=1 Model=1 kV=0.24 kW=0.691 kVAr=0.23 Vminpu=0.90 Vmaxpu=1.10 Daily=LoadShapeLoadDefault
New load.S44P Bus=44.1 Phases=1 Model=1 kV=0.24 kW=0.876 kVAr=0.292 Vminpu=0.90 Vmaxpu=1.10 Daily=LoadShapeLoadDefault
New load.S45P Bus=45.1 Phases=1 Model=1 kV=0.24 kW=0.912 kVAr=0.304 Vminpu=0.90 Vmaxpu=1.10 Daily=LoadShapeLoadDefault
