New PVsystem.PV5 irrad=1.0 Phases=1 Bus1=5.1 kV=12.66 kVA=9.972 Pmpp=8.31 %cutin=0.001 %cutout=0.001
New PVsystem.PV13 irrad=1.0 Phases=1 Bus1=13.1 kV=0.24 kVA=10.944 Pmpp=9.12 %cutin=0.001 %cutout=0.001
