! ieee9500xf_1ph: single-phase per-phase equivalent of test_networks\ieee9500_source\base\Master-bal-initial-config.dss (unmodified original).
! Written by problems/msopf/root_level/convert_to_1ph.jl -- do not edit by hand.
! The original's capacitor banks (kvar / 3), not redirected by Master.dss.
New generator.r18242C Phases=1 Bus1=r18242.1 kV=7.1996 Model=1 kW=1e-06 kVAr=300
New generator.r20185C Phases=1 Bus1=r20185.1 kV=7.1996 Model=1 kW=1e-06 kVAr=300
New generator.r42246C Phases=1 Bus1=r42246.1 kV=7.1996 Model=1 kW=1e-06 kVAr=400
New generator.r42247C Phases=1 Bus1=r42247.1 kV=7.1996 Model=1 kW=1e-06 kVAr=300
